<?xml version="1.0" encoding="UTF-8"?>
<neuroml xmlns="http://www.neuroml.org/schema/neuroml2"
         xmlns:xsi="http://www.w3.org/2001/XMLSchema-instance"
         xsi:schemaLocation="http://www.neuroml.org/schema/neuroml2  https://raw.github.com/NeuroML/NeuroML2/development/Schemas/NeuroML2/NeuroML_v2beta2.xsd"
         id="cell">

    <include href="ica_clamp.channel.nml"/>
    <include href="channelDensityGHK2.xml"/>

    <include href="../../capool.nml"/>
    <include href="../../cagk.channel.nml"/>
    <include href="../../cal.channel.nml"/>
    <include href="../../calH.channel.nml"/>
    <include href="../../car.channel.nml"/>
    <include href="../../cat.channel.nml"/>
    <include href="../../kca.channel.nml"/>

    <!-- Passive conductance -->
    <ionChannel id="passive_chan" type="ionChannelPassive" conductance="1pS" species="non_specific"/>

    <!-- Cellular properties -->
    <cell id="cell">

        <morphology id="just_a_cylinder">

            <segment id="0" name="Soma">
                <proximal x="0.0" y="0.0" z="0.0" diameter="1.0"/>
                <distal x="0.0" y="0.0" z="10.0" diameter="1.0"/>
            </segment>

            <segmentGroup id="soma_group">
                <member segment="0"/>
            </segmentGroup>

        </morphology>

        <biophysicalProperties id="biophys">

            <membraneProperties>

                <channelDensity condDensity="0.3mS_per_cm2" id="passive" ionChannel="passive_chan" erev="-65 mV" ion="non_specific"/>
                <!--<channelDensity condDensity="0mS_per_cm2" id="ica_clamp_all" ionChannel="ica_clamp" erev="50mV" ion="ca"/>-->
                <channelDensityGHK2 id="cal_all" ionChannel="cal" condDensity="5mS_per_cm2" ion="ca"/>
                <channelDensityGHK2 id="cat_all" ionChannel="cat" condDensity="0mS_per_cm2" ion="ca"/>
                <channelDensity id="cagk_all" ionChannel="cagk" condDensity="5mS_per_cm2" erev="-77mV" ion="k"/>
                <channelDensity id="calH_all" ionChannel="calH" condDensity="5mS_per_cm2"   erev="140mV" ion="ca"/>
                <channelDensity id="car_all" ionChannel="car" condDensity="5mS_per_cm2" erev="140mV" ion="ca"/>
                <channelDensity id="kca_all" ionChannel="kca" condDensity="5mS_per_cm2" erev="-80mV" ion="k"/>

                <spikeThresh value="0 mV"/>
                <specificCapacitance value="1.0 uF_per_cm2"/>
                <initMembPotential value="-65.0 mV"/>

            </membraneProperties>

            <intracellularProperties>

                <species id="ca" ion="ca" concentrationModel="capool"
                         initialConcentration="1e-4 mM" initialExtConcentration="2 mM"/>

                <resistivity value="0.1 kohm_cm"/>

            </intracellularProperties>

        </biophysicalProperties>

    </cell>

    <!-- Point process: Current clamp -->
    <pulseGenerator id="IClamp" delay="40ms" duration="120ms" amplitude="0.001nA"/>

    <!-- Create a single-cell network -->
    <network id="net1" type="networkWithTemperature" temperature = "34 degC">
        <population id="pop" component="cell" type="populationList" size="1">
            <instance id="0">
                <location x="0" y="0" z="0"/>
            </instance>
        </population>

        <inputList id="IClamp" component="IClamp" population="pop">
            <input id="0" target="../pop/0/cell" destination="synapses"/>
        </inputList>

    </network>

</neuroml>
