<?xml version="1.0" encoding="UTF-8"?>
<neuroml xmlns="http://www.neuroml.org/schema/neuroml2"
    xmlns:xsi="http://www.w3.org/2001/XMLSchema-instance"
    xsi:schemaLocation="http://www.neuroml.org/schema/neuroml2 https://raw.github.com/NeuroML/NeuroML2/development/Schemas/NeuroML2/NeuroML_v2beta4.xsd"
    id = "NeuroML2_file_exported_from_NEURON">

  <include href="/channels/cagk.channel.nml"/>
  <include href="/channels/cal.channel.nml"/>
  <include href="/channels/calH.channel.nml"/>
  <include href="/channels/car.channel.nml"/>
  <include href="/channels/cardend.channel.nml"/>
  <include href="/channels/cat.channel.nml"/>
  <include href="/channels/h.channel.nml"/>
  <include href="/channels/kadist.channel.nml"/>
  <include href="/channels/kaprox.channel.nml"/>
  <include href="/channels/kca.channel.nml"/>
  <include href="/channels/kdr.channel.nml"/>
  <include href="/channels/kdrdend.channel.nml"/>
  <include href="/channels/km.channel.nml"/>
  <include href="/channels/leak_chan.channel.nml"/>
  <include href="/channels/na.channel.nml"/>
  <include href="/channels/nadend.channel.nml"/>
  <include href="/channels/nap.channel.nml"/>
  <include href="/channels/capool.nml"/>

  <cell id="CA1Pyr">
    <notes>Cell: CA1Pyr exported from NEURON ModelView</notes>
    <morphology id="morphology">
<!-- Section: CA1Pyr[0].soma[0] (segmentGroup: soma_0) which has 2 3D points, so 1 segment(s)-->
      <segment id="0" name = "Seg0_soma_0">
        <proximal x="2.497" y="-13.006" z="11.13" diameter="4.58"/>
        <distal x="2.497" y="-13.006" z="11.12" diameter="4.58"/>
      </segment>
<!-- Section: CA1Pyr[0].apical_dendrite[0] (segmentGroup: apical_dendrite_0) which has 21 3D points, so 20 segment(s)-->
      <segment id="1809" name = "Seg0_apical_dendrite_0">
        <parent segment="0"/>
        <proximal x="2.497" y="-13.006" z="11.12" diameter="3.88716"/>
        <distal x="3.209" y="-14.938" z="11.12" diameter="3.88716"/>
      </segment>
      <segment id="1810" name = "Seg1_apical_dendrite_0">
        <parent segment="1809"/>
        <distal x="4.632" y="-17.051" z="8.88" diameter="3.88716"/>
      </segment>
      <segment id="1811" name = "Seg2_apical_dendrite_0">
        <parent segment="1810"/>
        <distal x="4.632" y="-17.221" z="9.12" diameter="3.88716"/>
      </segment>
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
<!-- Section: CA1Pyr[0].soma[0] (segmentGroup: soma_0) which has 2 3D points, so 1 segment(s)-->

      <segmentGroup id = "soma_0"  neuroLexId="sao864921383">
         <notes>This group contains an unbranched set of segments, and all of the segmentGroups marked with
             neuroLexId = sao864921383 form a non-overlapping set of all of the segments.
             These segmentGroups correspond to the 'cables' of NeuroML v1.8.1, and map to/from NEURON sections.</notes>
        <!-- This is currently inside (old convention) & outside (new convention) the <annotation> element, as some APIs have trouble reading what's inside <annotation> (<xs:any..> in Schema) -->
        <property tag="numberInternalDivisions" value="5"/> <!-- Discretization of model at time of export from NEURON. Can be overridden by importing application -->
        <annotation>
          <property tag="numberInternalDivisions" value="5"/> <!-- Discretization of model at time of export from NEURON. Can be overridden by importing application -->
        </annotation>
        <member segment = "0"/>
      </segmentGroup>

<!-- Section: CA1Pyr[0].apical_dendrite[0] (segmentGroup: apical_dendrite_0) which has 21 3D points, so 20 segment(s)-->

      <segmentGroup id = "apical_dendrite_0"  neuroLexId="sao864921383">
         <notes>This group contains an unbranched set of segments, and all of the segmentGroups marked with
             neuroLexId = sao864921383 form a non-overlapping set of all of the segments.
             These segmentGroups correspond to the 'cables' of NeuroML v1.8.1, and map to/from NEURON sections.</notes>
        <!-- This is currently inside (old convention) & outside (new convention) the <annotation> element, as some APIs have trouble reading what's inside <annotation> (<xs:any..> in Schema) -->
        <property tag="numberInternalDivisions" value="5"/> <!-- Discretization of model at time of export from NEURON. Can be overridden by importing application -->
        <annotation>
          <property tag="numberInternalDivisions" value="5"/> <!-- Discretization of model at time of export from NEURON. Can be overridden by importing application -->
        </annotation>
        <member segment = "1809"/>
        <member segment = "1810"/>
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      </segmentGroup>

<!-- Section: CA1Pyr[0].soma[1] (segmentGroup: soma_1) which has 15 3D points, so 14 segment(s)-->

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
      <segmentGroup id="soma_group">
        <include segmentGroup = "soma_0"/>
        <include segmentGroup = "soma_1"/>
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      </segmentGroup>

      <segmentGroup id="basal_group">
        <include segmentGroup = "dendrite_0"/>
        <include segmentGroup = "dendrite_1"/>
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      </segmentGroup>

      <segmentGroup id="axon_group">
        <include segmentGroup = "dendrite_18"/>
        <include segmentGroup = "dendrite_19"/>
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      </segmentGroup>

      <segmentGroup id="apical_group">
        <include segmentGroup = "apical_trunk_group"/>
        <include segmentGroup = "apical_non_trunk_group"/>
      </segmentGroup>

      <segmentGroup id="apical_trunk_group">
        <include segmentGroup = "apical_dendrite_0"/> <!-- vertical distance from soma: 13.40 um -->
        <include segmentGroup = "apical_dendrite_4"/> <!-- 46.03 -->
        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 <!-- 423.75 -->

        <inhomogeneousParameter id="PathLengthOverApicalDendrites" variable="p_apical_dendrite" metric="Path Length from root">
        </inhomogeneousParameter>  <!-- TODO: implement perpendicular distance... -->

      </segmentGroup>

      <segmentGroup id="apical_non_trunk_group">
        <include segmentGroup = "apical_non_trunk_proximal_group"/>
        <include segmentGroup = "apical_non_trunk_distal_group"/>
        <include segmentGroup = "apical_non_trunk_verydistal_group"/>
      </segmentGroup>

      <segmentGroup id="apical_non_trunk_proximal_group">
        <include segmentGroup = "apical_dendrite_1"/>
        <include segmentGroup = "apical_dendrite_2"/>
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      </segmentGroup>

      <segmentGroup id="apical_non_trunk_dist_group"> <!-- see: oblique dendrites NEURON code -->
          <include segmentGroup = "apical_dendrite_72"/>
          <include segmentGroup = "apical_dendrite_73"/>
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      </segmentGroup>

      <segmentGroup id="apical_non_trunk_verydist_group"> <!-- see: oblique dendrites NEURON code -->
        <include segmentGroup = "apical_dendrite_84"/>
        <include segmentGroup = "apical_dendrite_85"/>
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      </segmentGroup>

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
    </morphology>

<!-- ***************************************************************************************************************************** -->

      <biophysicalProperties id="biophys">

      <membraneProperties>

        <!-- ********** SOMA ********** -->

        <channelDensity ionChannel="na" id="na_soma" condDensity="7mS_per_cm2" segmentGroup="soma_group" erev="50mV" ion="na"/>
        <channelDensity ionChannel="kdr" id="kdr_soma" condDensity="1.4mS_per_cm2" segmentGroup="soma_group" erev="-77mV" ion="k"/>
        <channelDensity ionChannel="leak_chan" id="leak_soma" condDensity="5e-3mS_per_cm2" segmentGroup="soma_group" erev="-70mV" ion="non_specific"/>
        <channelDensity ionChannel="hs" id="hs_soma" condDensity="1.872e-2mS_per_cm2" segmentGroup="soma_group" erev="-10mV" ion="na"/>
        <channelDensity ionChannel="kaprox" id="kaprox_soma" condDensity="7.5mS_per_cm2" segmentGroup="soma_group" erev="-80mV" ion="k"/>
        <channelDensity ionChannel="km" id="km_soma" condDensity="60mS_per_cm2" segmentGroup="soma_group" erev="-80mV" ion="k"/>
        <channelDensityGHK2 ionChannel="cal" id="cal_soma" condDensity="7mS_per_cm2" segmentGroup="soma_group" ion="ca"/>
        <channelDensityGHK2 ionChannel="cat" id="cat_soma" condDensity="0.1mS_per_cm2" segmentGroup="soma_group" ion="ca"/> --> <!-- TODO: dummy Ca...-->
        <channelDensity ionChannel="car" id="car_soma" condDensity="0.3mS_per_cm2" segmentGroup="soma_group" erev="140mV" ion="ca"/>
        <channelDensity ionChannel="kca" id="kca_soma" condDensity="0.5mS_per_cm2" segmentGroup="soma_group" erev="-80mV" ion="k"/>
        <channelDensity ionChannel="cagk" id="cagk_soma" condDensity="90.75mS_per_cm2" segmentGroup="soma_group" erev="-77mV" ion="k"/> <!-- TODO: check erev...-->

        <!-- ********** AXON ********** -->

        <channelDensity ionChannel="na" id="na_axon" condDensity="100mS_per_cm2" segmentGroup="axon_group" erev="50mV" ion="na"/>
        <channelDensity ionChannel="kdr" id="kdr_axon" condDensity="20mS_per_cm2" segmentGroup="axon_group" erev="-77mV" ion="k"/>
        <channelDensity ionChannel="leak_chan" id="leak_axon" condDensity="5e-3mS_per_cm2" segmentGroup="axon_group" erev="-70mV" ion="non_specific"/>

        <!-- ********** APICAL TRUNK ********** -->

        <!-- h (sigmoid) with param: gmax = f(p) = (1.872e-5 + (8*1.872e-5)/(1 + exp((280-p_apical_trunk)/50))) S/cm2 -->
        <channelDensityNonUniform ionChannel="hdend" id="hdend_apical_trunk" erev="-10mV" ion="na">
            <variableParameter parameter="condDensity" segmentGroup="apical_trunk_group">
                <inhomogeneousValue inhomogeneousParameter="PathLengthOverApicalDendrites" value="1e4 * (1.872e-5 + (8*1.872e-5)/(1 + exp((280-p_apical_trunk)/50)))"/>
            </variableParameter>
        </channelDensityNonUniform>
        <channelDensity ionChannel="cardend" id="car_apical_trunk_group" condDensity="0.3mS_per_cm2" segmentGroup="apical_trunk_group" erev="140mV" ion="ca"/>
        <!-- calH (H(50-p_apical_trunk)) with param: gmax = f(p) = H(50-p) * 3.1635e-5 S/cm2 -->
        <channelDensityNonUniform ionChannel="calH" id="calHprox_apical_trunk" erev="140mV" ion="ca">
            <variableParameter parameter="condDensity" segmentGroup="apical_trunk_group">
                <inhomogeneousValue inhomogeneousParameter="PathLengthOverApicalDendrites" value="1e4 * H(50-p_apical_trunk) * 3.1635e-5"/>
            </variableParameter>
        </channelDensityNonUniform>
        <!-- calH (H(p_apical_trunk-50)) with param: gmax = f(p) = H(p-50) * 1.45521e-3 S/cm2 -->
        <channelDensityNonUniform ionChannel="calH" id="calHdist_apical_trunk" erev="140mV" ion="ca">
            <variableParameter parameter="condDensity" segmentGroup="apical_trunk_group">
                <inhomogeneousValue inhomogeneousParameter="PathLengthOverApicalDendrites" value="1e4 * H(p_apical_trunk-50) * 1.45521e-3"/>
            </variableParameter>
        </channelDensityNonUniform>

        <!-- cat (H(p_apical_trunk-100)) with param: gmax = f(p) = H(p_apical_trunk-100) * 4 * 0.1 * p_apical_trunk/350 S/cm2 -->
        <!--<channelDensityGHK2NonUniform ionChannel="cat" id="cat_apical_trunk" ion="ca">
            <variableParameter parameter="condDensity" segmentGroup="apical_trunk_group">
                <inhomogeneousValue inhomogeneousParameter="PathLengthOverApicalDendrites" value="1e4 * H(p_apical_trunk-100) * 4 * 0.1 * p_apical_trunk/350."/>
            </variableParameter>
        </channelDensityGHK2NonUniform>-->

        <!-- kca (H(50-p_apical_trunk)) with param: gmax = f(p) = H(50-p_apical_trunk) * 5e-5 S/cm2 -->
        <channelDensityNonUniform ionChannel="kca" id="kcaprox_apical_trunk" erev="-80mV" ion="k">
            <variableParameter parameter="condDensity" segmentGroup="apical_trunk_group">
                <inhomogeneousValue inhomogeneousParameter="PathLengthOverApicalDendrites" value="1e4 * H(50-p_apical_trunk) * 5e-5"/>
            </variableParameter>
        </channelDensityNonUniform>
        <!-- kca H(p_apical_trunk-50)*H(200-p_apical_trunk) with param: gmax = f(p) = H(p_apical_trunk-50)*H(200-p_apical_trunk) * 5e-4 S/cm2 -->
        <channelDensityNonUniform ionChannel="kca" id="kca_apical_trunk" erev="-80mV" ion="k">
            <variableParameter parameter="condDensity" segmentGroup="apical_trunk_group">
                <inhomogeneousValue inhomogeneousParameter="PathLengthOverApicalDendrites" value="1e4 * H(p_apical_trunk-50)*H(200-p_apical_trunk) * 5e-4"/>
            </variableParameter>
        </channelDensityNonUniform>
        <!-- kca (H(p_apical_trunk-200)) with param: gmax = f(p) = H(p_apical_trunk-200) * 5e-5 S/cm2 -->
        <channelDensityNonUniform ionChannel="kca" id="kcadist_apical_trunk" erev="-80mV" ion="k">
            <variableParameter parameter="condDensity" segmentGroup="apical_trunk_group">
                <inhomogeneousValue inhomogeneousParameter="PathLengthOverApicalDendrites" value="1e4 * H(p_apical_trunk-200) * 5e-5"/>
            </variableParameter>
        </channelDensityNonUniform>
        <!-- cagk (H(50-p_apical_trunk)) with param: gmax = f(p) = H(50-p_apical_trunk) * 4.125e-3 S/cm2 -->
        <channelDensityNonUniform ionChannel="cagk" id="cagkprox_apical_trunk" erev="-77mV" ion="k"> <!-- TODO: check erev...-->
            <variableParameter parameter="condDensity" segmentGroup="apical_trunk_group">
                <inhomogeneousValue inhomogeneousParameter="PathLengthOverApicalDendrites" value="1e4 * H(50-p_apical_trunk) * 4.125e-3"/>
            </variableParameter>
        </channelDensityNonUniform>
        <!-- cagk H(p_apical_trunk-50)*H(200-p_apical_trunk) with param: gmax = f(p) = H(p_apical_trunk-50)*H(200-p_apical_trunk) * 3.3e-2 S/cm2 -->
        <channelDensityNonUniform ionChannel="cagk" id="cagk_apical_trunk" erev="-77mV" ion="k"> <!-- TODO: check erev...-->
            <variableParameter parameter="condDensity" segmentGroup="apical_trunk_group">
                <inhomogeneousValue inhomogeneousParameter="PathLengthOverApicalDendrites" value="1e4 * H(p_apical_trunk-50)*H(200-p_apical_trunk) * 3.3e-2"/>
            </variableParameter>
        </channelDensityNonUniform>
        <!-- cagk (H(p_apical_trunk-200)) with param: gmax = f(p) = H(p_apical_trunk-200) * 4.125e-3 S/cm2 -->
        <channelDensityNonUniform ionChannel="cagk" id="cagkdist_apical_trunk" erev="-77mV" ion="k"> <!-- TODO: check erev...-->
            <variableParameter parameter="condDensity" segmentGroup="apical_trunk_group">
                <inhomogeneousValue inhomogeneousParameter="PathLengthOverApicalDendrites" value="1e4 * H(p_apical_trunk-200) * 4.125e-3"/>
            </variableParameter>
        </channelDensityNonUniform>
        <channelDensity ionChannel="km" id="km_apical_trunk" condDensity="60mS_per_cm2" segmentGroup="apical_trunk_group" erev="-77mV" ion="k"/>
        <!-- kaprox (H(100-p_apical_trunk)) with param: gmax = f(p) = H(100-p_apical_trunk) * 7.5e-3 S/cm2 -->
        <channelDensityNonUniform ionChannel="kaprox" id="kaprox_apical_trunk" erev="-80mV" ion="k">
            <variableParameter parameter="condDensity" segmentGroup="apical_trunk_group">
                <inhomogeneousValue inhomogeneousParameter="PathLengthOverApicalDendrites" value="1e4 * H(100-p_apical_trunk) * 7.5e-3"/>
            </variableParameter>
        </channelDensityNonUniform>
        <!-- kadist (H(p_apical_trunk-100)*H(350-p_apical_trunk)) with param: gmax = f(p) = H(p_apical_trunk-100)*H(350-p_apical_trunk) * 6.5 * 7.488e-3 * p_apical_trunk/350 S/cm2 -->
        <channelDensityNonUniform ionChannel="kadist" id="kadist_apical_trunk" erev="-80mV" ion="k">
            <variableParameter parameter="condDensity" segmentGroup="apical_trunk_group">
                <inhomogeneousValue inhomogeneousParameter="PathLengthOverApicalDendrites" value="1e4 * H(p_apical_trunk-100)*H(350-p_apical_trunk) * 6.5 * 7.488e-3 * p_apical_trunk/350"/>
            </variableParameter>
        </channelDensityNonUniform>
        <!-- kadist (H(p_apical_trunk-350)) with param: gmax = f(p) = H(p_apical_trunk-350) * 6.5 * 7.488e-3 S/cm2 -->
        <channelDensityNonUniform ionChannel="kadist" id="kaverydist_apical_trunk" erev="-80mV" ion="k">
            <variableParameter parameter="condDensity" segmentGroup="apical_trunk_group">
                <inhomogeneousValue inhomogeneousParameter="PathLengthOverApicalDendrites" value="1e4 * H(p_apical_trunk-350) * 6.5 * 7.488e-3"/>
            </variableParameter>
        </channelDensityNonUniform>
        <!-- nadend (H(50-p_apical_trunk)) with param: gmax = f(p) = H(50-p_apical_trunk) * 7e-3 S/cm2 -->
        <channelDensityNonUniform ionChannel="nadend_0_95" id="nadendprox_apical_trunk" erev="50mV" ion="na">
            <variableParameter parameter="condDensity" segmentGroup="apical_trunk_group">
                <inhomogeneousValue inhomogeneousParameter="PathLengthOverApicalDendrites" value="1e4 * H(50-p_apical_trunk) * 7e-3"/>
            </variableParameter>
        </channelDensityNonUniform>

        <!-- nadend (H(p_apical_trunk-50)*H(300-p_apical_trunk)) with param: gmax = f(p) = H(p_apical_trunk-50)*H(300-p_apical_trunk) * 7e-3 S/cm2 -->
        <channelDensityNonUniform ionChannel="nadend_0_4335" id="nadend_apical_trunk" erev="50mV" ion="na">
            <!-- TODO: make this work!!! ... -->
            <!--<variableParameter parameter="s_steadyState_no_inact" segmentGroup="apical_trunk_group">
                <inhomogeneousValue inhomogeneousParameter="PathLengthOverApicalDendrites" value="0.95 - (0.65/250)*p_apical_trunk"/>
            </variableParameter>-->
            <variableParameter parameter="condDensity" segmentGroup="apical_trunk_group">
                <inhomogeneousValue inhomogeneousParameter="PathLengthOverApicalDendrites" value="1e4 * H(p_apical_trunk-50)*H(300-p_apical_trunk) * 7e-3"/>
            </variableParameter>
        </channelDensityNonUniform>

        <!-- nadend (H(p_apical_trunk-300)) with param: gmax = f(p) = H(p_apical_trunk-300) * 7e-3 S/cm2 -->
        <channelDensityNonUniform ionChannel="nadend_0_3" id="nadenddist_apical_trunk" erev="50mV" ion="na">
            <variableParameter parameter="condDensity" segmentGroup="apical_trunk_group">
                <inhomogeneousValue inhomogeneousParameter="PathLengthOverApicalDendrites" value="1e4 * H(p_apical_trunk-300) * 7e-3"/>
            </variableParameter>
        </channelDensityNonUniform>
        <channelDensity ionChannel="kdrdend" id="kdr_apical_trunk" condDensity="0.868mS_per_cm2" segmentGroup="apical_trunk_group" erev="-77mV" ion="k"/>
        <!-- leak_chan (sigmoid) with param: gmax = f(p) = 1 / (200000 - (188000/(1 + exp((200-p_apical_trunk)/50)))) S/cm2 -->
        <channelDensityNonUniform ionChannel="leak_chan" id="leak_apical_trunk" erev="-70mV" ion="k">
            <variableParameter parameter="condDensity" segmentGroup="apical_trunk_group">
                <inhomogeneousValue inhomogeneousParameter="PathLengthOverApicalDendrites" value="1e4 * 1 / (200000 - (188000/(1 + exp((200-p_apical_trunk)/50))))"/>
            </variableParameter>
        </channelDensityNonUniform>

        <!-- ********** APICAL NON TRUNK ********** -->

        <!-- inserted to apical_non_trunk_group in NEURON (ar2 changed when inserting to oblique dendrites) -->
        <channelDensity ionChannel="nadend_0_4335" id="nadend_apical_non_trunk_proximal" condDensity="7mS_per_cm2" segmentGroup="apical_non_trunk_proximal_group" erev="50mV" ion="na"/>
        <channelDensity ionChannel="kdrdend" id="kdrdend_apical_non_trunk_proximal" condDensity="0.868mS_per_cm2" segmentGroup="apical_non_trunk_proximal_group" erev="-77mV" ion="k"/>
        <!-- inserted to apical_non_trunk_group in NEURON (but changed when inserting to oblique dendrites) -->
        <channelDensity ionChannel="leak_chan" id="leak_apical_non_trunk_proximal" condDensity="6.938e-3mS_per_cm2" segmentGroup="apical_non_trunk_proximal_group" erev="-70mV" ion="non_specific"/>
        <!-- inserted to oblique dendrites, which are further than 50 um from parent trunk, same values as apical_dendrite_46 in NEURON -->
        <channelDensity ionChannel="kadist" id="kadist_apical_non_trunk_proximal" condDensity="27.2848mS_per_cm2" segmentGroup="apical_non_trunk_proximal_group" erev="-77mV" ion="k"/> <!-- 1.25 * apical_dendrite_46 -->
        <channelDensity ionChannel="hdend" id="hdend_apical_non_trunk_proximal" condDensity="3.05e-2mS_per_cm2" segmentGroup="apical_non_trunk_proximal_group" erev="-10mV" ion="na"/>
        <channelDensity ionChannel="cardend" id="cardend_apical_non_trunk_proximal" condDensity="0.03mS_per_cm2" segmentGroup="apical_non_trunk_proximal_group" erev="140mV" ion="ca"/>
        <channelDensity ionChannel="calH" id="calH_apical_non_trunk_proximal" condDensity="1.45521mS_per_cm2" segmentGroup="apical_non_trunk_proximal_group" erev="140mV" ion="ca"/>
        <!-- <channelDensityGHK2 ionChannel="cat" id="cat_apical_non_trunk_proximal" condDensity="0.17938mS_per_cm2" segmentGroup="apical_non_trunk_proximal_group" ion="ca"/> -->
        <channelDensity ionChannel="kca" id="kca_apical_non_trunk_proximal" condDensity="5e-2mS_per_cm2" segmentGroup="apical_non_trunk_proximal_group" erev="-77mV" ion="k"/>
        <channelDensity ionChannel="cagk" id="cagk_apical_non_trunk_proximal" condDensity="18.15mS_per_cm2" segmentGroup="apical_non_trunk_proximal_group" erev="-77mV" ion="k"/> <!-- not based on apical_dendrite_46 -->
        <channelDensity ionChannel="km" id="km_apical_non_trunk_proximal" condDensity="120mS_per_cm2" segmentGroup="apical_non_trunk_proximal_group" erev="-77mV" ion="k"/> <!-- 2 * apical_dendrite_46 -->
        <channelDensity ionChannel="nap" id="nap_apical_non_trunk_proximal" condDensity="2.8e-3mS_per_cm2" segmentGroup="apical_non_trunk_proximal_group" erev="50mV" ion="na"/> <!-- not based on apical_dendrite_46 -->

        <!-- some of the above values are changed if xdist is more than 300 -->
        <!-- inserted to apical_non_trunk_group in NEURON (ar2 changed when inserting to oblique dendrites) -->
        <channelDensity ionChannel="nadend_0_4335" id="nadend_apical_non_trunk_distal" condDensity="0.92876mS_per_cm2" segmentGroup="apical_non_trunk_distal_group" erev="50mV" ion="na"/> <!-- 1.07 * kdrdend apical_dendrite_46 -->
        <channelDensity ionChannel="kdrdend" id="kdrdend_apical_non_trunk_distal" condDensity="0.868mS_per_cm2" segmentGroup="apical_non_trunkdistal_group" erev="-77mV" ion="k"/>
        <!-- inserted to apical_non_trunk_group in NEURON (but changed when inserting to oblique dendrites) -->
        <channelDensity ionChannel="leak_chan" id="leak_apical_non_trunk_distal" condDensity="6.938e-3mS_per_cm2" segmentGroup="apical_non_trunk_distal_group" erev="-70mV" ion="non_specific"/>
        <!-- inserted to oblique dendrites, which are further than 300 um (xdist) -->
        <channelDensity ionChannel="kadist" id="kadist_apical_non_trunk_distal" condDensity="53.9149mS_per_cm2" segmentGroup="apical_non_trunk_distal_group" erev="-77mV" ion="k"/> <!-- 2.469 * apical_dendrite_46 -->
        <channelDensity ionChannel="hdend" id="hdend_apical_non_trunk_distal" condDensity="3.05e-2mS_per_cm2" segmentGroup="apical_non_trunk_distal_group" erev="-10mV" ion="na"/>
        <channelDensity ionChannel="cardend" id="cardend_apical_non_trunk_distal" condDensity="0.39mS_per_cm2" segmentGroup="apical_non_trunk_distal_group" erev="140mV" ion="ca"/> <!-- 13 * apical_dendrite_46 -->
        <channelDensity ionChannel="calH" id="calH_apical_non_trunk_distal" condDensity="20.37294mS_per_cm2" segmentGroup="apical_non_trunk_distal_group" erev="140mV" ion="ca"/> <!-- 14 * apical_dendrite_46 -->
        <!-- <channelDensityGHK2 ionChannel="cat" id="cat_apical_non_trunk_distal" condDensity="0.17938mS_per_cm2" segmentGroup="apical_non_trunk_distal_group" ion="ca"/> -->
        <channelDensity ionChannel="kca" id="kca_apical_non_trunk_distal" condDensity="0.5mS_per_cm2" segmentGroup="apical_non_trunk_distal_group" erev="-77mV" ion="k"/> <!-- not based on apical_dendrite_46: soma -->
        <channelDensity ionChannel="cagk" id="cagk_apical_non_trunk_distal" condDensity="18.15mS_per_cm2" segmentGroup="apical_non_trunk_distal_group" erev="-77mV" ion="k"/> <!-- not based on apical_dendrite_46 -->
        <channelDensity ionChannel="km" id="km_apical_non_trunk_distal" condDensity="120mS_per_cm2" segmentGroup="apical_non_trunk_distal_group" erev="-77mV" ion="k"/> <!-- 2 * apical_dendrite_46 -->
        <channelDensity ionChannel="nap" id="nap_apical_non_trunk_distal" condDensity="2.8e-3mS_per_cm2" segmentGroup="apical_non_trunk_distal_group" erev="50mV" ion="na"/> <!-- not based on apical_dendrite_46 -->

        <!-- some of the above values are changed if xdist is more than 350 -->
        <!-- inserted to apical_non_trunk_group in NEURON (ar2 changed) -->
        <channelDensity ionChannel="nadend_0_95" id="nadend_apical_non_trunk_verydistal" condDensity="0.92876mS_per_cm2" segmentGroup="apical_non_trunk_verydistal_group" erev="50mV" ion="na"/> <!-- 1.07 * kdrdend apical_dendrite_46 -->
        <channelDensity ionChannel="kdrdend" id="kdrdend_apical_non_trunk_verydistal" condDensity="0.868mS_per_cm2" segmentGroup="apical_non_trunk_verydistal_group" erev="-77mV" ion="k"/>
        <!-- inserted to apical_non_trunk_group in NEURON (but changed when inserting to oblique dendrites) -->
        <channelDensity ionChannel="leak_chan" id="leak_apical_non_trunk_verydistal" condDensity="6.938e-3mS_per_cm2" segmentGroup="apical_non_trunk_verydistal_group" erev="-70mV" ion="non_specific"/>
        <!-- inserted to oblique dendrites, which are further than 350 um (xdist) -->
        <channelDensity ionChannel="kadist" id="kadist_apical_non_trunk_verydistal" condDensity="53.9149mS_per_cm2" segmentGroup="apical_non_trunk_verydistal_group" erev="-77mV" ion="k"/> <!-- 2.469 * apical_dendrite_46 -->
        <channelDensity ionChannel="hdend" id="hdend_apical_non_trunk_verydistal" condDensity="3.05e-2mS_per_cm2" segmentGroup="apical_non_trunk_verydistal_group" erev="-10mV" ion="na"/>
        <channelDensity ionChannel="cardend" id="cardend_apical_non_trunk_verydistal" condDensity="0.39mS_per_cm2" segmentGroup="apical_non_trunk_verydistal_group" erev="140mV" ion="ca"/> <!-- 13 * apical_dendrite_46 -->
        <channelDensity ionChannel="calH" id="calH_apical_non_trunk_verydistal" condDensity="21.82815mS_per_cm2" segmentGroup="apical_non_trunk_distal_group" erev="140mV" ion="ca"/> <!-- 15 * apical_dendrite_46 -->
        <!-- <channelDensityGHK2 ionChannel="cat" id="cat_apical_non_trunk_verydistal" condDensity="0.17938mS_per_cm2" segmentGroup="apical_non_trunk_verydistal_group" ion="ca"/> -->
        <channelDensity ionChannel="kca" id="kca_apical_non_trunk_verydistal" condDensity="0.5mS_per_cm2" segmentGroup="apical_non_trunk_verydistal_group" erev="-77mV" ion="k"/> <!-- not based on apical_dendrite_46: soma -->
        <channelDensity ionChannel="cagk" id="cagk_apical_non_trunk_verydistal" condDensity="18.15mS_per_cm2" segmentGroup="apical_non_trunk_verydistal_group" erev="-77mV" ion="k"/> <!-- not based on apical_dendrite_46 -->
        <channelDensity ionChannel="km" id="km_apical_non_trunk_verydistal" condDensity="120mS_per_cm2" segmentGroup="apical_non_trunk_verydistal_group" erev="-77mV" ion="k"/> <!-- 2 * apical_dendrite_46 -->
        <channelDensity ionChannel="nap" id="nap_apical_non_trunk_verydistal" condDensity="5.6e-3mS_per_cm2" segmentGroup="apical_non_trunk_verydistal_group" erev="50mV" ion="na"/> <!-- not based on apical_dendrite_46 -->

        <!-- ********** BASAL ********** -->

        <channelDensity ionChannel="nadend_1" id="nadend_basal" condDensity="7mS_per_cm2" segmentGroup="basal_group" erev="60mV" ion="na"/>
        <channelDensity ionChannel="kdrdend" id="kdrdend_basal" condDensity="0.868mS_per_cm2" segmentGroup="basal_group" erev="-77mV" ion="k"/>
        <!-- same values as in apical_dendrite_14 -->
        <channelDensity ionChannel="hdend" id="hdend_basal" condDensity="2.0287e-2mS_per_cm2" segmentGroup="basal_group" erev="-10mV" ion="na"/>
        <channelDensity ionChannel="kaprox" id="kaprox_basal" condDensity="7.5mS_per_cm2" segmentGroup="basal_group" erev="-77mV" ion="k"/>
        <channelDensity ionChannel="leak_chan" id="leak_basal" condDensity="5.2453e-3mS_per_cm2" segmentGroup="basal_group" erev="-70mV" ion="non_specific"/>

        <spikeThresh value="0mV"/>

        <specificCapacitance value="1uF_per_cm2" />

        <initMembPotential value="-70.0mV"/>

      </membraneProperties>

      <intracellularProperties>

        <!-- Intracellular Calcium dynamics -->

        <species id="ca" ion="ca" concentrationModel="capool" segmentGroup="soma_group"
                 initialConcentration="1e-4mM" initialExtConcentration="2mM"/>
        <species id="ca" ion="ca" concentrationModel="capool" segmentGroup="apical_group"
                 initialConcentration="1e-4mM" initialExtConcentration="2mM"/>

        <resistivity value="0.05kohm_cm"/>
        <!-- TODO: resistivity of apical_trunk and basal dendrites is a sigmoid function (of distance) -->

      </intracellularProperties>

    </biophysicalProperties>

  </cell>

</neuroml>
